!==============================================================================
! 内置热传导精细化对标 APDL 模板 (LSEL + SFL 边界载荷)
!==============================================================================
FINISH
/CLEAR, NOSTART
/PREP7

! 普通2D面单元配置 (PLANE55 - 平面热学)
ET, 1, 55
KEYOPT, 1, 3, 0

! 材料属性 (由 Python 注入)
MP, KXX, 1, MAT_K
MP, DENS, 1, MAT_RHO
MP, C, 1, MAT_C

! 建立截面几何
RECTNG, PART_X1, PART_X2, PART_Y1, PART_Y2
ESIZE, PART_DX
MSHAPE, 0, 2D
MSHKEY, 1
AMESH, ALL

! 施加常驻边界条件 (左垂直线施加热流，顶部和底部绝热)
LSEL, S, LOC, X, BC_FLUX_XMIN, BC_FLUX_XMAX
SFL, ALL, HFLUX, BC_FLUX_VAL
LSEL, ALL

! 右侧固定温度
NSEL, S, LOC, X, BC_TEMP_XMIN, BC_TEMP_XMAX
D, ALL, TEMP, BC_TEMP_VAL
ALLSEL, ALL

! 求解配置
/SOLU
ANTYPE, 0
NLGEOM, OFF
KBC, 0
NSUBST, SOL_SUBSTEPS, SOL_SUBSTEPS, SOL_SUBSTEPS
OUTRES, ALL, ALL
SOLVE
SAVE, ansys_smoke_test, db
FINISH

! 自动后处理数据提取
/POST1
SET, LAST
PATH, MyPath, 2, 30, 10
PPATH, 1, 0, SAMPLE_START_X, SAMPLE_START_Y, 0.0
PPATH, 2, 0, SAMPLE_END_X, SAMPLE_END_Y, 0.0
PDEF, TEMPVAL, TEMP
/OUTPUT, ansys_val_results, txt
PRPATH, TEMPVAL
/OUTPUT
