! ==============================================================================
! ANSYS APDL MACRO: Axisymmetric Ring Tension Validation
! ==============================================================================
FINISH
PARSAV, ALL, mcp_params, txt
/CLEAR, NOSTART
PARRES, CHANGE, mcp_params, txt
/PREP7

! 1. 单元类型设置：PLANE182，并开启轴对称选项
ET, 1, PLANE182
KEYOPT, 1, 3, 1    ! KEYOPT(3) = 1 代表 Axisymmetric (轴对称)

! 2. 材料属性设置 (与 GRPD 对应)
MP, EX, 1, 200000.0    ! 杨氏模量 (MPa)
MP, PRXY, 1, 0.3       ! 泊松比

! --- 如果您想验证塑性，请取消下面几行的注释 ---
! GRPD的线性硬化模量 H = 500 MPa。ANSYS BISO 需要的是切线模量 Et。
! 换算公式：Et = (E * H) / (E + H) = (200000 * 500) / 200500 = 498.75 MPa
TB, BISO, 1, 1, 2
TBDATA, 1, 400.0     ! 初始屈服应力 (MPa)
TBDATA, 2, 498.75    ! 切线模量 Et (MPa)

! 3. 几何建模：创建矩形截面
! X 对应径向 (R)，Y 对应轴向 (Z)
! 对应 GRPD: Length=2.0, Offset X=0.5 -> X 从 0.5 到 2.5
!            Width=5.0,  Offset Y=0.0 -> Y 从 0.0 到 5.0
RECTNG, 0.5, 2.5, 0.0, 5.0

! 4. 网格划分
ESIZE, 0.05            ! 对应 GRPD 的 dx = 0.05
MSHAPE, 0, 2D          ! 四边形网格
MSHKEY, 1              ! 映射网格 (规则矩形网格)
AMESH, ALL

! 5. 施加边界条件
! 底端固定 Y 方向
NSEL, S, LOC, Y, 0.0
D, ALL, UY, 0.0

! 顶端施加 Y 方向拉伸位移
NSEL, S, LOC, Y, 5.0
D, ALL, UY, 0.5        ! 拉伸 0.5 (10% 应变)

NSEL, ALL

! 6. 求解设置
FINISH
/SOLU
ANTYPE, 0              ! 静力学分析 (Static)
NLGEOM, OFF            ! 几何大变形开关 (依据 GRPD 的 LargeDeformation 设置)

! 分步加载设置
NSUBST, 20, 20, 20     ! 对应 GRPD 的 NumSubsteps: 20
OUTRES, ALL, ALL
SOLVE

SAVE, ansys_val, db    ! 保存数据库以便在 GUI 中打开

FINISH

! 7. 导出给 MCP 服务器读取的文本结果
/POST1
*GET, chk_substep, PARM, MY_SUBSTEP, TYPE
*IF, chk_substep, EQ, 0, THEN
    SET, 1, MY_SUBSTEP
*ELSE
    SET, LAST
*ENDIF

! 沿中心轴提取 Y 向位移和等效应力
! --- MCP 动态传参支持 ---
*GET, chk_start_x, PARM, START_X, TYPE
*IF, chk_start_x, NE, 0, THEN
    START_X = 0.5
*ENDIF

*GET, chk_start_y, PARM, START_Y, TYPE
*IF, chk_start_y, NE, 0, THEN
    START_Y = 0.0
*ENDIF

*GET, chk_end_x, PARM, END_X, TYPE
*IF, chk_end_x, NE, 0, THEN
    END_X = 0.5
*ENDIF

*GET, chk_end_y, PARM, END_Y, TYPE
*IF, chk_end_y, NE, 0, THEN
    END_Y = 5.0
*ENDIF

PATH, MyPath, 2, 30, 10
PPATH, 1, 0, START_X, START_Y, 0.0
PPATH, 2, 0, END_X, END_Y, 0.0

PDEF, UY_ANSYS, U, Y
PDEF, SEQV_ANSYS, S, EQV

! 将数据输出到一个 .txt 文件，MCP 会自动抓取这个文件
/OUTPUT, ansys_val_results, txt
PRPATH, UY_ANSYS, SEQV_ANSYS
/OUTPUT
